<?xml version="1.0"?>
<propeller name="Simulated APC 12x5.5MR ">
  <ixx>       0.001 </ixx>
  <diameter unit="IN"> 12   </diameter>
  <numblades> 2   </numblades>
  <minpitch> 5.5 </minpitch>
  <maxpitch> 5.5 </maxpitch>
  <table name="C_THRUST" type="internal">
    <tableData>
	0	0.1114
	0.02	0.1101
	0.05	0.1086
	0.07	0.107
	0.1	0.1051
	0.12	0.1029
	0.14	0.1005
	0.17	0.0978
	0.19	0.0949
	0.22	0.0918
	0.24	0.0885
	0.27	0.0849
	0.29	0.0812
	0.31	0.0773
	0.34	0.0733
	0.36	0.0691
	0.39	0.0649
	0.41	0.0605
	0.43	0.056
	0.46	0.0514
	0.48	0.0467
	0.51	0.0419
	0.53	0.037
	0.55	0.032
	0.58	0.0269
	0.6	0.0217
	0.63	0.0164
	0.65	0.011
	0.68	0.0055
	0.7	0
    </tableData>
  </table>
  <table name="C_POWER" type="internal">
    <tableData>
	0	0.0465
	0.02	0.0462
	0.05	0.0458
	0.07	0.0455
	0.1	0.0451
	0.12	0.0447
	0.14	0.0442
	0.17	0.0438
	0.19	0.0433
	0.22	0.0428
	0.24	0.0422
	0.27	0.0415
	0.29	0.0408
	0.31	0.0399
	0.34	0.0389
	0.36	0.0377
	0.39	0.0364
	0.41	0.035
	0.43	0.0335
	0.46	0.0317
	0.48	0.0298
	0.51	0.0278
	0.53	0.0255
	0.55	0.0231
	0.58	0.0205
	0.6	0.0177
	0.63	0.0148
	0.65	0.0118
	0.68	0.0089
	0.7	0.006
    </tableData>
  </table>
</propeller>
