<?xml version="1.0"?>
<propeller name="Simulated APC 13x8 6K">
  <ixx> 0.000207 </ixx>
  <diameter unit="IN"> 13 </diameter>
  <numblades> 2   </numblades>
  <minpitch> 8.0 </minpitch>
  <maxpitch> 8.0 </maxpitch>
  <table name="C_THRUST" type="internal">
    <tableData>
		0		0.1002
		0.03	0.1
		0.06	0.0997
		0.09	0.0993
		0.11	0.0988
		0.14	0.0979
		0.17	0.0966
		0.2		0.0951
		0.23	0.0932
		0.26	0.091
		0.29	0.0886
		0.31	0.0858
		0.34	0.0828
		0.37	0.0795
		0.4		0.0758
		0.43	0.0719
		0.46	0.0676
		0.49	0.063
		0.51	0.0583
		0.54	0.0535
		0.57	0.0486
		0.6		0.0436
		0.63	0.0385
		0.66	0.0333
		0.69	0.0279
		0.71	0.0225
		0.74	0.017
		0.77	0.0114
		0.8		0.0058
		0.83	0

    </tableData>
  </table>
  <table name="C_POWER" type="internal">
    <tableData>
		0		0.0388
		0.03	0.0398
		0.06	0.0409
		0.09	0.042
		0.11	0.043
		0.14	0.0439
		0.17	0.0446
		0.2		0.0452
		0.23	0.0457
		0.26	0.046
		0.29	0.0461
		0.31	0.0461
		0.34	0.0458
		0.37	0.0453
		0.4		0.0446
		0.43	0.0436
		0.46	0.0423
		0.49	0.0408
		0.51	0.039
		0.54	0.037
		0.57	0.0348
		0.6		0.0324
		0.63	0.0297
		0.66	0.0268
		0.69	0.0236
		0.71	0.0201
		0.74	0.0164
		0.77	0.0124
		0.8		0.0081
		0.83	0.0041
    </tableData>
  </table>
</propeller>
